Pic := "snoop.jpg"
Text := "text.txt"
C := READRGB(Pic)
# [component: inputs Pic]
R := READ_RED(Pic)
G := READ_GREEN(Pic)
B := READ_BLUE(Pic)
M := READBIN(Text, "byte")
# [component: inputs C]
G =  # no stored result
R =  # no stored result
B =  # no stored result
M = [72; 101; 108; 108; 111; 32; 87; 111; 114; 108; 100]
t := vec2str(M)
t = "Hello World"
Na := 256
K := "@J|eKc-I980"
Nk := strlen(K)
Nk = 11
Nm := rows(M)
Nm = 11
Kl :=
    K ← str2vec(K)
    for i ∈ 0 .. Nm - 1
        r ← mod(i, Nk)
        Kl[i] ← K[r]
    Kl
Kl = [64; 74; 124; 101; 75; 99; 45; 73; 57; 56; 48]
M_cod :=
    for j ∈ 0 .. Nm - 1
        M_cod[j] ← mod(M[j] + Kl[j], Na)
    M_cod
M_cod = [136; 175; 232; 209; 186; 131; 132; 184; 171; 164; 148]
m_start := ""n0G@m0k"
m_end := "KiHeu,6"
sMe := stack(str2vec(m_start), M_cod, str2vec(m_end))
rows(sMe) = 26
8*rows(sMe) = 208
3*rows(C)*cols(C) = 453600
sMe = [34; 110; 48; 71; 64; 109; 48; 107; 136; 175; 232; 209; 186; 131; 132; 184; 171; 164; 148; 75; 105; 72; 101; 117; 44; 54]
D2B(x) :=
    for i ∈ 0 .. 7
        V[i] ← mod(x, 2)
        x ← floor(x/2)
    V
B2D(x) := sum(x[i]*2^i, i = 0 .. 7)
Cv :=
    C1 ← augment(B, G, R)
    Cv ← C1[:, 0]
    for i ∈ 1 .. cols(C1) - 1
        Cv ← stack(Cv, C1[:, i])
Sv :=
    for m ∈ 0 .. rows(sMe) - 1
        b ← D2B(sMe[m])
        for i ∈ 0 .. 7
            P ← D2B(Cv[i + 8*m])
            P[0] ← b[i]
            Sv[i + 8*m] ← B2D(P)
    for j ∈ rows(Sv) .. rows(Cv) - 1
        P ← D2B(Cv[j])
        P[0] ← round(rnd(1))
        Sv[j] ← B2D(P)
    Sv
Cv =  # no stored result
Sv =  # no stored result
S1 :=
    S1 ← submatrix(Sv, 0, rows(C) - 1, 0, 0)
    for i ∈ 0 .. cols(C) - 1
        Si ← submatrix(Sv, i*rows(C), (i + 1)*rows(C) - 1, 0, 0)
        S1 ← augment(S1, Si)
    S1
S1 =  # no stored result
B_M := submatrix(S1, 0, rows(C) - 1, 0, cols(C)/3 - 1)
G_M := submatrix(S1, 0, rows(C) - 1, cols(C)/3, 2*cols(C)/3 - 1)
R_M := submatrix(S1, 0, rows(C) - 1, 2*cols(C)/3, cols(C) - 1)
B_M =  # no stored result
G_M =  # no stored result
R_M =  # no stored result
S := augment(R_M, G_M, B_M)
S =  # no stored result
# [component: inputs S]
# [component: inputs [(R_M, G_M, B_M), □, □]]
WRITERGB("new_pic.jpg") := S
# Распаковка сообщения:
file := "new_pic.jpg"
R1 := READ_RED(file)
G1 := READ_GREEN(file)
B1 := READ_BLUE(file)
Sv1 :=
    S1 ← augment(B1, G1, R1)
    Sv1 ← S1[:, 0]
    for i ∈ 1 .. cols(S1) - 1
        Sv1 ← stack(Sv1, S1[:, i])
Sv1 =  # no stored result
Mf :=
    for m ∈ 0 .. rows(Sv1)/8 - 1
        for i ∈ 0 .. 7
            P ← D2B(Sv1[i + 8*m])
            b[i] ← P[0]
        Mf[m] ← B2D(b)
        Mf[m] ← Mf[m] + 32.5 if Mf[m] < 32
    Mf
Mf =  # no stored result
N :=
    for s ∈ 0 .. 31
        i ← 0
        for m ∈ 0 .. rows(Mf) - 1
            if Mf[m] == s + 32.5
                N[i, s] ← m
                i ← i + 1
    N
N =  # no stored result
m1_start := m_start = ""n0G@m0k"
m1_end := m_end = "KiHeu,6"
M_cod1 :=
    s ← 0
    e ← 0
    bs ← strlen(m1_start)
    be ← strlen(m1_end)
    Mf ← vec2str(Mf)
    for m ∈ 0 .. strlen(Mf) - 1
        s ← m + bs if substr(Mf, m, bs) == m1_start and s == 0
        e ← m - 1 if substr(Mf, m, be) == m1_end and e == 0
        if s ≠ 0 and e ≠ 0
            {
                break
            }
    Mf ← substr(Mf, s, e - s + 1)
    M_cod1 ← str2vec(Mf)
    for n ∈ 0 .. cols(N) - 1
        for i ∈ 0 .. rows(N) - 1
            if N[i, n] == 0 or N[i, n] > e
                {
                    break
                }
            M_cod1[N[i, n] - bs] ← n if s < N[i, n] ≤ e
    M_cod1
M_cod1 = [136; 175; 232; 209; 186; 131; 132; 184; 171; 164; 148]
vec2str(M_cod) = "¯èÑº¸«¤"
vec2str(M_cod1) = "¯èÑº¸«¤"
M_cod == M_cod1 = 1
Kl1 :=
    K ← str2vec(K)
    for i ∈ 0 .. Nm - 1
        r ← mod(i, Nk)
        Kl[i] ← K[r]
    Kl
M1 :=
    for j ∈ 0 .. Nm - 1
        M[j] ← mod(Na + M_cod1[j] - Kl1[j], Na)
    M
Kl1 = [64; 74; 124; 101; 75; 99; 45; 73; 57; 56; 48]
M1 = [72; 101; 108; 108; 111; 32; 87; 111; 114; 108; 100]
WRITEBIN("M_dec1.txt", "byte", 0) := M1
vec2str(M1) = "Hello World"
